! LocalFlex Grid network (Stage 2: 3-phase 4-wire with explicit neutral, 50 Hz). ALL VALUES ARE ASSUMPTIONS - see parameter_register.csv.
set DefaultBaseFrequency=50
clear
new circuit.lf basekv=11.0 pu=1.0 phases=3 bus1=src basefreq=50
new transformer.tr phases=3 windings=2 buses=[src,lv.1.2.3.4] conns=[delta,wye] kvs=[11.0,0.415] kvas=[250,250] %loadloss=1.0 xhl=4.5
new reactor.ng phases=1 bus1=lv.4 R=0.001 X=0.0001
new linecode.lv4 nphases=4 rmatrix=(0.32 | 0 0.32 | 0 0 0.32 | 0 0 0 0.64) xmatrix=(0.13 | 0.05 0.13 | 0.05 0.05 0.13 | 0.05 0.05 0.05 0.13) units=km basefreq=50
new line.F1_a1 bus1=lv.1.2.3.4 bus2=a1.1.2.3.4 phases=4 linecode=lv4 length=0.1 units=km
new line.F1_a2 bus1=a1.1.2.3.4 bus2=a2.1.2.3.4 phases=4 linecode=lv4 length=0.1 units=km
new line.F1_a3 bus1=a2.1.2.3.4 bus2=a3.1.2.3.4 phases=4 linecode=lv4 length=0.1 units=km
new line.F1_a4 bus1=a3.1.2.3.4 bus2=a4.1.2.3.4 phases=4 linecode=lv4 length=0.1 units=km
new line.F1_a5 bus1=a4.1.2.3.4 bus2=a5.1.2.3.4 phases=4 linecode=lv4 length=0.1 units=km
new line.F2_b1 bus1=lv.1.2.3.4 bus2=b1.1.2.3.4 phases=4 linecode=lv4 length=0.1 units=km
new line.F2_b2 bus1=b1.1.2.3.4 bus2=b2.1.2.3.4 phases=4 linecode=lv4 length=0.1 units=km
new line.F2_b3 bus1=b2.1.2.3.4 bus2=b3.1.2.3.4 phases=4 linecode=lv4 length=0.1 units=km
new line.F2_b4 bus1=b3.1.2.3.4 bus2=b4.1.2.3.4 phases=4 linecode=lv4 length=0.1 units=km
new line.F2_b5 bus1=b4.1.2.3.4 bus2=b5.1.2.3.4 phases=4 linecode=lv4 length=0.1 units=km
new load.h0 bus1=a1.2.4 phases=1 kv=0.2396 kw=1.234 pf=0.95 model=1
new load.h1 bus1=a1.3.4 phases=1 kv=0.2396 kw=1.079 pf=0.95 model=1
new load.h2 bus1=a1.3.4 phases=1 kv=0.2396 kw=0.964 pf=0.95 model=1
new load.h3 bus1=a1.1.4 phases=1 kv=0.2396 kw=1.012 pf=0.95 model=1
new load.h4 bus1=a1.1.4 phases=1 kv=0.2396 kw=1.186 pf=0.95 model=1
new load.h5 bus1=a1.3.4 phases=1 kv=0.2396 kw=0.922 pf=0.95 model=1
new load.h6 bus1=a1.1.4 phases=1 kv=0.2396 kw=1.045 pf=0.95 model=1
new load.h7 bus1=a1.3.4 phases=1 kv=0.2396 kw=1.092 pf=0.95 model=1
new load.h8 bus1=a1.3.4 phases=1 kv=0.2396 kw=0.928 pf=0.95 model=1
new load.h9 bus1=a1.2.4 phases=1 kv=0.2396 kw=1.010 pf=0.95 model=1
new load.h10 bus1=a2.1.4 phases=1 kv=0.2396 kw=1.133 pf=0.95 model=1
new load.h11 bus1=a2.1.4 phases=1 kv=0.2396 kw=1.205 pf=0.95 model=1
new load.h12 bus1=a2.1.4 phases=1 kv=0.2396 kw=0.826 pf=0.95 model=1
new load.h13 bus1=a2.2.4 phases=1 kv=0.2396 kw=1.217 pf=0.95 model=1
new load.h14 bus1=a2.2.4 phases=1 kv=0.2396 kw=0.753 pf=0.95 model=1
new load.h15 bus1=a2.2.4 phases=1 kv=0.2396 kw=1.126 pf=0.95 model=1
new load.h16 bus1=a2.3.4 phases=1 kv=0.2396 kw=1.155 pf=0.95 model=1
new load.h17 bus1=a2.3.4 phases=1 kv=0.2396 kw=0.818 pf=0.95 model=1
new load.h18 bus1=a2.2.4 phases=1 kv=0.2396 kw=0.959 pf=0.95 model=1
new load.h19 bus1=a2.3.4 phases=1 kv=0.2396 kw=1.158 pf=0.95 model=1
new load.h20 bus1=a3.1.4 phases=1 kv=0.2396 kw=0.757 pf=0.95 model=1
new load.h21 bus1=a3.1.4 phases=1 kv=0.2396 kw=1.064 pf=0.95 model=1
new load.h22 bus1=a3.2.4 phases=1 kv=0.2396 kw=1.147 pf=0.95 model=1
new load.h23 bus1=a3.1.4 phases=1 kv=0.2396 kw=1.007 pf=0.95 model=1
new load.h24 bus1=a3.1.4 phases=1 kv=0.2396 kw=1.113 pf=0.95 model=1
new load.h25 bus1=a3.2.4 phases=1 kv=0.2396 kw=0.863 pf=0.95 model=1
new load.h26 bus1=a3.2.4 phases=1 kv=0.2396 kw=0.849 pf=0.95 model=1
new load.h27 bus1=a3.3.4 phases=1 kv=0.2396 kw=0.932 pf=0.95 model=1
new load.h28 bus1=a3.2.4 phases=1 kv=0.2396 kw=0.840 pf=0.95 model=1
new load.h29 bus1=a3.2.4 phases=1 kv=0.2396 kw=0.923 pf=0.95 model=1
new load.h30 bus1=a4.2.4 phases=1 kv=0.2396 kw=1.224 pf=0.95 model=1
new load.h31 bus1=a4.1.4 phases=1 kv=0.2396 kw=1.037 pf=0.95 model=1
new load.h32 bus1=a4.1.4 phases=1 kv=0.2396 kw=0.920 pf=0.95 model=1
new load.h33 bus1=a4.1.4 phases=1 kv=0.2396 kw=0.886 pf=0.95 model=1
new load.h34 bus1=a4.2.4 phases=1 kv=0.2396 kw=1.226 pf=0.95 model=1
new load.h35 bus1=a4.1.4 phases=1 kv=0.2396 kw=0.972 pf=0.95 model=1
new load.h36 bus1=a4.1.4 phases=1 kv=0.2396 kw=1.240 pf=0.95 model=1
new load.h37 bus1=a4.1.4 phases=1 kv=0.2396 kw=1.008 pf=0.95 model=1
new load.h38 bus1=a4.3.4 phases=1 kv=0.2396 kw=1.011 pf=0.95 model=1
new load.h39 bus1=a4.1.4 phases=1 kv=0.2396 kw=1.198 pf=0.95 model=1
new load.h40 bus1=a5.1.4 phases=1 kv=0.2396 kw=1.121 pf=0.95 model=1
new load.h41 bus1=a5.3.4 phases=1 kv=0.2396 kw=1.040 pf=0.95 model=1
new load.h42 bus1=a5.2.4 phases=1 kv=0.2396 kw=0.963 pf=0.95 model=1
new load.h43 bus1=a5.3.4 phases=1 kv=0.2396 kw=1.189 pf=0.95 model=1
new load.h44 bus1=a5.2.4 phases=1 kv=0.2396 kw=0.956 pf=0.95 model=1
new load.h45 bus1=a5.3.4 phases=1 kv=0.2396 kw=1.211 pf=0.95 model=1
new load.h46 bus1=a5.1.4 phases=1 kv=0.2396 kw=0.784 pf=0.95 model=1
new load.h47 bus1=a5.2.4 phases=1 kv=0.2396 kw=0.965 pf=0.95 model=1
new load.h48 bus1=a5.2.4 phases=1 kv=0.2396 kw=1.010 pf=0.95 model=1
new load.h49 bus1=a5.3.4 phases=1 kv=0.2396 kw=1.225 pf=0.95 model=1
new load.h50 bus1=b1.1.4 phases=1 kv=0.2396 kw=0.875 pf=0.95 model=1
new load.h51 bus1=b1.2.4 phases=1 kv=0.2396 kw=1.153 pf=0.95 model=1
new load.h52 bus1=b1.1.4 phases=1 kv=0.2396 kw=1.088 pf=0.95 model=1
new load.h53 bus1=b1.1.4 phases=1 kv=0.2396 kw=1.109 pf=0.95 model=1
new load.h54 bus1=b1.1.4 phases=1 kv=0.2396 kw=1.065 pf=0.95 model=1
new load.h55 bus1=b1.1.4 phases=1 kv=0.2396 kw=1.236 pf=0.95 model=1
new load.h56 bus1=b1.3.4 phases=1 kv=0.2396 kw=0.916 pf=0.95 model=1
new load.h57 bus1=b1.1.4 phases=1 kv=0.2396 kw=0.949 pf=0.95 model=1
new load.h58 bus1=b1.3.4 phases=1 kv=0.2396 kw=0.851 pf=0.95 model=1
new load.h59 bus1=b1.2.4 phases=1 kv=0.2396 kw=0.775 pf=0.95 model=1
new load.h60 bus1=b2.2.4 phases=1 kv=0.2396 kw=0.856 pf=0.95 model=1
new load.h61 bus1=b2.2.4 phases=1 kv=0.2396 kw=1.208 pf=0.95 model=1
new load.h62 bus1=b2.2.4 phases=1 kv=0.2396 kw=1.170 pf=0.95 model=1
new load.h63 bus1=b2.1.4 phases=1 kv=0.2396 kw=0.806 pf=0.95 model=1
new load.h64 bus1=b2.2.4 phases=1 kv=0.2396 kw=1.052 pf=0.95 model=1
new load.h65 bus1=b2.1.4 phases=1 kv=0.2396 kw=0.990 pf=0.95 model=1
new load.h66 bus1=b2.2.4 phases=1 kv=0.2396 kw=1.047 pf=0.95 model=1
new load.h67 bus1=b2.1.4 phases=1 kv=0.2396 kw=1.080 pf=0.95 model=1
new load.h68 bus1=b2.3.4 phases=1 kv=0.2396 kw=0.903 pf=0.95 model=1
new load.h69 bus1=b2.1.4 phases=1 kv=0.2396 kw=1.231 pf=0.95 model=1
new load.h70 bus1=b3.2.4 phases=1 kv=0.2396 kw=0.983 pf=0.95 model=1
new load.h71 bus1=b3.1.4 phases=1 kv=0.2396 kw=1.064 pf=0.95 model=1
new load.h72 bus1=b3.3.4 phases=1 kv=0.2396 kw=1.068 pf=0.95 model=1
new load.h73 bus1=b3.2.4 phases=1 kv=0.2396 kw=0.842 pf=0.95 model=1
new load.h74 bus1=b3.1.4 phases=1 kv=0.2396 kw=0.781 pf=0.95 model=1
new load.h75 bus1=b3.3.4 phases=1 kv=0.2396 kw=0.956 pf=0.95 model=1
new load.h76 bus1=b3.3.4 phases=1 kv=0.2396 kw=1.132 pf=0.95 model=1
new load.h77 bus1=b3.3.4 phases=1 kv=0.2396 kw=1.158 pf=0.95 model=1
new load.h78 bus1=b3.2.4 phases=1 kv=0.2396 kw=1.115 pf=0.95 model=1
new load.h79 bus1=b3.1.4 phases=1 kv=0.2396 kw=0.807 pf=0.95 model=1
new load.h80 bus1=b4.1.4 phases=1 kv=0.2396 kw=1.207 pf=0.95 model=1
new load.h81 bus1=b4.3.4 phases=1 kv=0.2396 kw=1.151 pf=0.95 model=1
new load.h82 bus1=b4.2.4 phases=1 kv=0.2396 kw=1.189 pf=0.95 model=1
new load.h83 bus1=b4.1.4 phases=1 kv=0.2396 kw=1.012 pf=0.95 model=1
new load.h84 bus1=b4.3.4 phases=1 kv=0.2396 kw=1.208 pf=0.95 model=1
new load.h85 bus1=b4.2.4 phases=1 kv=0.2396 kw=0.773 pf=0.95 model=1
new load.h86 bus1=b4.2.4 phases=1 kv=0.2396 kw=0.765 pf=0.95 model=1
new load.h87 bus1=b4.1.4 phases=1 kv=0.2396 kw=0.760 pf=0.95 model=1
new load.h88 bus1=b4.2.4 phases=1 kv=0.2396 kw=0.876 pf=0.95 model=1
new load.h89 bus1=b4.1.4 phases=1 kv=0.2396 kw=0.874 pf=0.95 model=1
new load.h90 bus1=b5.1.4 phases=1 kv=0.2396 kw=0.844 pf=0.95 model=1
new load.h91 bus1=b5.3.4 phases=1 kv=0.2396 kw=1.034 pf=0.95 model=1
new load.h92 bus1=b5.2.4 phases=1 kv=0.2396 kw=0.769 pf=0.95 model=1
new load.h93 bus1=b5.2.4 phases=1 kv=0.2396 kw=1.045 pf=0.95 model=1
new load.h94 bus1=b5.1.4 phases=1 kv=0.2396 kw=0.833 pf=0.95 model=1
new load.h95 bus1=b5.3.4 phases=1 kv=0.2396 kw=1.089 pf=0.95 model=1
new load.h96 bus1=b5.1.4 phases=1 kv=0.2396 kw=0.761 pf=0.95 model=1
new load.h97 bus1=b5.1.4 phases=1 kv=0.2396 kw=0.905 pf=0.95 model=1
new load.h98 bus1=b5.1.4 phases=1 kv=0.2396 kw=1.219 pf=0.95 model=1
new load.h99 bus1=b5.1.4 phases=1 kv=0.2396 kw=1.019 pf=0.95 model=1
new generator.pv1 bus1=a1.3.4 phases=1 kv=0.2396 kw=3.0 pf=1 model=1
new generator.pv3 bus1=a1.1.4 phases=1 kv=0.2396 kw=3.0 pf=1 model=1
new generator.pv4 bus1=a1.1.4 phases=1 kv=0.2396 kw=3.0 pf=1 model=1
new generator.pv6 bus1=a1.1.4 phases=1 kv=0.2396 kw=3.0 pf=1 model=1
new generator.pv7 bus1=a1.3.4 phases=1 kv=0.2396 kw=3.0 pf=1 model=1
new generator.pv9 bus1=a1.2.4 phases=1 kv=0.2396 kw=3.0 pf=1 model=1
new generator.pv12 bus1=a2.1.4 phases=1 kv=0.2396 kw=3.0 pf=1 model=1
new generator.pv13 bus1=a2.2.4 phases=1 kv=0.2396 kw=3.0 pf=1 model=1
new generator.pv15 bus1=a2.2.4 phases=1 kv=0.2396 kw=3.0 pf=1 model=1
new generator.pv20 bus1=a3.1.4 phases=1 kv=0.2396 kw=3.0 pf=1 model=1
new generator.pv21 bus1=a3.1.4 phases=1 kv=0.2396 kw=3.0 pf=1 model=1
new generator.pv25 bus1=a3.2.4 phases=1 kv=0.2396 kw=3.0 pf=1 model=1
new generator.pv27 bus1=a3.3.4 phases=1 kv=0.2396 kw=3.0 pf=1 model=1
new generator.pv28 bus1=a3.2.4 phases=1 kv=0.2396 kw=3.0 pf=1 model=1
new generator.pv31 bus1=a4.1.4 phases=1 kv=0.2396 kw=3.0 pf=1 model=1
new generator.pv32 bus1=a4.1.4 phases=1 kv=0.2396 kw=3.0 pf=1 model=1
new generator.pv35 bus1=a4.1.4 phases=1 kv=0.2396 kw=3.0 pf=1 model=1
new generator.pv36 bus1=a4.1.4 phases=1 kv=0.2396 kw=3.0 pf=1 model=1
new generator.pv37 bus1=a4.1.4 phases=1 kv=0.2396 kw=3.0 pf=1 model=1
new generator.pv38 bus1=a4.3.4 phases=1 kv=0.2396 kw=3.0 pf=1 model=1
new generator.pv39 bus1=a4.1.4 phases=1 kv=0.2396 kw=3.0 pf=1 model=1
new generator.pv40 bus1=a5.1.4 phases=1 kv=0.2396 kw=3.0 pf=1 model=1
new generator.pv42 bus1=a5.2.4 phases=1 kv=0.2396 kw=3.0 pf=1 model=1
new generator.pv44 bus1=a5.2.4 phases=1 kv=0.2396 kw=3.0 pf=1 model=1
new generator.pv48 bus1=a5.2.4 phases=1 kv=0.2396 kw=3.0 pf=1 model=1
new generator.pv51 bus1=b1.2.4 phases=1 kv=0.2396 kw=3.0 pf=1 model=1
new generator.pv54 bus1=b1.1.4 phases=1 kv=0.2396 kw=3.0 pf=1 model=1
new generator.pv55 bus1=b1.1.4 phases=1 kv=0.2396 kw=3.0 pf=1 model=1
new generator.pv62 bus1=b2.2.4 phases=1 kv=0.2396 kw=3.0 pf=1 model=1
new generator.pv63 bus1=b2.1.4 phases=1 kv=0.2396 kw=3.0 pf=1 model=1
new generator.pv66 bus1=b2.2.4 phases=1 kv=0.2396 kw=3.0 pf=1 model=1
new generator.pv67 bus1=b2.1.4 phases=1 kv=0.2396 kw=3.0 pf=1 model=1
new generator.pv71 bus1=b3.1.4 phases=1 kv=0.2396 kw=3.0 pf=1 model=1
new generator.pv75 bus1=b3.3.4 phases=1 kv=0.2396 kw=3.0 pf=1 model=1
new generator.pv80 bus1=b4.1.4 phases=1 kv=0.2396 kw=3.0 pf=1 model=1
new generator.pv83 bus1=b4.1.4 phases=1 kv=0.2396 kw=3.0 pf=1 model=1
new generator.pv84 bus1=b4.3.4 phases=1 kv=0.2396 kw=3.0 pf=1 model=1
new generator.pv85 bus1=b4.2.4 phases=1 kv=0.2396 kw=3.0 pf=1 model=1
new generator.pv87 bus1=b4.1.4 phases=1 kv=0.2396 kw=3.0 pf=1 model=1
new generator.pv90 bus1=b5.1.4 phases=1 kv=0.2396 kw=3.0 pf=1 model=1
new load.dev_WH1 bus1=a2.3.4 phases=1 kv=0.2396 kw=0 pf=1.0 model=1
new load.dev_WH2 bus1=a4.1.4 phases=1 kv=0.2396 kw=0 pf=1.0 model=1
new load.dev_WH3 bus1=b3.2.4 phases=1 kv=0.2396 kw=0 pf=1.0 model=1
new load.dev_WH4 bus1=b5.1.4 phases=1 kv=0.2396 kw=0 pf=1.0 model=1
new load.dev_PUMP1 bus1=a3.1.4 phases=1 kv=0.2396 kw=0 pf=0.85 model=1
new load.dev_PUMP2 bus1=b2.3.4 phases=1 kv=0.2396 kw=0 pf=0.85 model=1
new load.dev_EV1 bus1=a5.1.4 phases=1 kv=0.2396 kw=0 pf=0.95 model=1
new load.dev_EV2 bus1=b4.2.4 phases=1 kv=0.2396 kw=0 pf=0.95 model=1
new load.dev_BATT bus1=a4.1.2.3.4 phases=3 conn=wye kv=0.415 kw=0 pf=1.0 model=1 vminpu=0.8
set voltagebases=[11.0,0.415]
calcv
set mode=snap
